// COMSOL Multiphysics 5.4.0.388 model "2DTurbulentFlow.mph"
// Outline of the model tree

Parameters
  r0 = 0.05[m]
  a = 1[m]
  Re = 2000
  mu = 1.0016*10^(-3)[Pa*s]
  rho = 1000[kg*m^(-3)]

Geometry
  geom1 "Geometry 1" (2D, length unit m)
    c1: Circle | pos = {r0, r0}; r = r0
    c2: Circle | pos = {2*a-r0, r0}; r = r0
    c3: Circle | pos = {2*a-r0, 2*a-r0}; r = r0
    c4: Circle | pos = {r0, 2*a-r0}; r = r0
    r1: Rectangle | pos = {a, 2*a-r0/2}; base = center; size = {2*a-2*r0, r0}
    r2: Rectangle | pos = {2*a-r0/2, a}; base = center; size = {r0, 2*a-2*r0}
    r3: Rectangle | pos = {a, r0/2}; base = center; size = {2*a-2*r0, r0}
    r4: Rectangle | pos = {r0/2, a}; base = center; size = {r0, 2*a-2*r0}
    sq1: Square | pos = {a, a}; base = center; size = 2*a-2*r0
    uni1: Union | input = c1, c2, c3, c4, r1, r2, r3, r4, sq1; intbnd = off; edge = all
    fin: Finalize "Form Union"

Materials
  mat1: Common "Water" on all domains
    def "Basic"
      thermalexpansioncoefficient = alpha_p(T)
      bulkviscosity = muB(T)
      dynamicviscosity = eta(T)
      ratioofspecificheat = gamma_w(T)
      electricconductivity = 5.5e-6[S/m]
      heatcapacity = Cp(T)
      density = rho(T)
      thermalconductivity = k(T)
      soundspeed = cs(T)
      eta: Piecewise
        arg = T
        pieces = 
          {273.15, 413.15, 1.3799566804-0.021224019151*T^1+1.3604562827E-4*T^2-4.6454090319E-7*T^3+8.9042735735E-10*T^4-9.0790692686E-13*T^5+3.8457331488E-16*T^6}
          {413.15, 553.75, 0.00401235783-2.10746715E-5*T^1+3.85772275E-8*T^2-2.39730284E-11*T^3}
        argunit = K
        fununit = Pa*s
      Cp: Piecewise | arg = T; pieces = {273.15, 553.75, 12010.1471-80.4072879*T^1+0.309866854*T^2-5.38186884E-4*T^3+3.62536437E-7*T^4}; argunit = K; fununit = J/(kg*K)
      rho: Piecewise
        arg = T
        smooth = contd1
        pieces = 
          {273.15, 293.15, 6.3092789034e-05*T^3-0.0603676398829*T^2+18.9229382407066*T-950.704055329848}
          {293.15, 373.15, 1.0335053319e-05*T^3-0.0133950656345*T^2+4.96928883266*T+432.257114008512}
        argunit = K
        fununit = kg/m^3
      k: Piecewise | arg = T; pieces = {273.15, 553.75, -0.869083936+0.00894880345*T^1-1.58366345E-5*T^2+7.97543259E-9*T^3}; argunit = K; fununit = W/(m*K)
      cs: Interpolation | table = {{273, 1403}, {278, 1427}, {283, 1447}, {293, 1481}, {303, 1507}, {313, 1526}, {323, 1541}, {333, 1552}, {343, 1555}, {353, 1555}, {363, 1550}, {373, 1543}}; interp = piecewisecubic; argunit = K; fununit = m/s
      an1: Analytic | funcname = alpha_p; expr = -1/rho(T)*d(rho(T),T); args = T; argunit = K; fununit = 1/K
      an2: Analytic | funcname = gamma_w; expr = 1+(T/Cp(T))*(alpha_p(T)*cs(T))^2; args = T; argunit = K; fununit = 1
      an3: Analytic | funcname = muB; expr = 2.79*eta(T); args = T; argunit = K; fununit = Pa*s
  mat2: Common "Water 1"
    // same settings as mat1

Physics
  spf: TurbulentFlowLVEL on all domains
    dependent variable u = {u, v, w}
    fp1: FluidProperties (default)
    init1: init "Initial Values 1" (default)
    wallbc1: WallBC "Wall 1" (default) | uvw = Re*mu/rho/a; SlidingWall = 1

Mesh
  mesh1 "Mesh 1" (physics-controlled)
    size: MeshSizeDefault | table = cfd; hauto = 4

Studies
  std1 "Study 1"
    wdi: WallDistanceInitialization
    stat: Stationary

Solver configurations
  sol1 "Solution 1" (study std1)
    v1: Variables "Dependent Variables 1"
    s1: Stationary "Stationary Solver 1" | stol = 1.0E-6
      fc1: FullyCoupled | linsolver = d1; initstep = 0.01; minstep = 1.0E-6; maxiter = 50
      d1: Direct | linsolver = pardiso; pivotperturb = 1.0E-13
    su1: StoreSolution
    v2: Variables "Dependent Variables 2" | initmethod = sol; notsolmethod = sol
    s2: Stationary "Stationary Solver 2"
      se1: Segregated | maxsegiter = 300; segstabacc = segcflcmp; subinitcfl = 2; subkdpid = 0.03; subcfltol = 0.08
        ss1: SegregatedStep "Velocity u, Pressure p" | segvar = {comp1_u, comp1_p}; linsolver = d1; subdamp = 0.5
        ss2: SegregatedStep "Turbulence variables"
          segvar = {comp1_uPlus}
          linsolver = d2
          subdamp = 0.35
          subtermconst = itertol
          subiter = 3
          subntolfact = 1
        ll1: LowerLimit | lowerlimit = comp1.uPlus 0
      d1: Direct | linsolver = pardiso; pivotperturb = 1.0E-13
      d2: Direct | linsolver = pardiso; pivotperturb = 1.0E-13
  sol2 "Solution Store 1" (study std1)

Datasets
  dset1: Solution | solution = sol1
  dset2: Solution | solution = sol2

Plots
  pg1: PlotGroup2D "Velocity (spf)" | data = dset1
    surf1: Surface | data = dset1; expr = comp1.p; descr = Pressure (Re = 2000)